Si(x) := integral(sin(y)/y, y = 0 .. x)
ε2min(R) := 1 - 2/π*Si(2*π*R)
R := 1, 2 .. 20
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R := 10
F := 3600
Nф := 17
B := 5
Ts := R/F
θ := B/(Nф - 1) = 0.3125
K0 := 1
ε2min(R) = 0.010127
fд := F/θ = 11520
α := B/(2*θ) = 8
N := 2*α + 1
n := 0, 1 .. N
g(n) :=
    F*K0*sin(π*B)/(π*B) if n == 0 or n == N - 1
    (2*F*K0) if n == α
    (2*F*K0*sin(2*π*θ*(n - α))/(2*π*θ*(n - α))) otherwise
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b[n] := g(n)/fд
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b[0] = 1.21814e-17
b[1] = 0.0420114
b[2] = -0.0375132
b[3] = -0.0243624
b[4] = 0.0795775
b[5] = -0.040604
b[6] = -0.11254
Ns := Ts*fд + 1
b[7] = 0.29408
b[8] = 0.625
S(n) :=
    0 if n < 0
    1/2 if n == 0
    1 if n > 0 and n < Ns - 1
    1/2 if n == Ns - 1
    0 if n > Ns - 1
n := -1, 0 .. Ns  # f
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'
Nф = 17
Ns = 33
E := sum(S(k)^2, k = 0 .. Ns - 1) = 31.5
ε2min(R) = 0.010127
ε2теор := 1/E*sum((S(m - α) - 1/fд + sum(S(k)*g(m - k), k = 0 .. m))^2, m = 0 .. Nф + Ns - 1) = 135292322
