A := 1
freq := 1
T := 1/(2*freq)
S1(t) :=
    (A*(1 - |t|/T)) if |t| ≤ T
    0 if |t| > T
S2(t) := S1(2*t)
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Δt := 1/freq
i := sqrt(-1)
U2(f) := integral(S2(t)*e^(-i*2*π*f*t), t = -T/2 .. T/2)
U1(f) := integral(S1(t)*e^(-i*2*π*f*t), t = -T/2 .. T/2)
A2Fbd := 0.01*|U2(0)| = 0.0025
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F0 := 2*10^-3
φ1(f) := arg(U1(f))
φ2(f) := arg(U2(f))
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_S1(t) := hilbert(S1(t))
_S2(t) := hilbert(S2(t))
An(t) := S1(t) - i*_S1(t)
Av(t) := S2(t) + i*_S2(t)
Z(t) := (A + An(t) + Av(t))*e^(i*2*π*F0*t)
a(t) := Re(Z(t))
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