A := 1
T := 2
f := 1
S31(t) :=
    (A*(1 - |t|/T)) if |t| ≤ T
    0 if |t| > T
S32(t) := S31(2*t)
N := 4096
k := 0 .. N - 1
Δt := T/N
m := 0 .. N/2
S31_array[k] := S31(k*Δt)
S32_array[k] := S32(k*Δt)
S31_fft := fft(S31_array)
S32_fft := fft(S32_array)
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