A := 5
N := 1024
mn := 67*6/1.2 = 335
t := 0 .. N - 1
k := 0 .. N/2
0
ω := 50
ωd :=
    floor(FRAME/4) if 0 ≤ FRAME ≤ 100
    25 if FRAME ≥ 100
Ω :=
    1 if 0 ≤ FRAME ≤ 100
    floor(FRAME/10) - 8 if FRAME > 100
ω := 335
ωd := 12000/1200
Ω := 6
a[t] := A*cos(ω*t*2*π/N + ωd*sin(2*π*t*Ω/N))
b := fft(a)
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