x0 := -10
x1 := -3
x2 := 0
x3 := 12
x4 := 30
y0 := 9.5
y1 := 6
y2 := 10
y3 := -4
y4 := -4.8
Δ1_0 := (y1 - y0)/(x1 - x0)
Δ1_1 := (y2 - y1)/(x2 - x1)
Δ1_2 := (y3 - y2)/(x3 - x2)
Δ1_3 := (y4 - y3)/(x4 - x3)
x := [-10; -3; 0; 12; 30]
y := [9.5; 6; 10; -4; -4.8]
Δ2_0 := (Δ1_1 - Δ1_0)/(x2 - x0)
Δ2_1 := (Δ1_2 - Δ1_1)/(x3 - x1)
Δ2_2 := (Δ1_3 - Δ1_2)/(x4 - x2)
Δ3_0 := (Δ2_1 - Δ2_0)/(x3 - x0)
Δ3_1 := (Δ2_2 - Δ2_1)/(x4 - x1)
Nn_0(Z) := y0
Δ4_0 := (Δ3_1 - Δ3_0)/(x4 - x0)
Nn_1(Z) := (Z - x0)*Δ1_0
Nn_2(Z) := (Z - x0)*(Z - x1)*Δ2_0
Nn_3(Z) := (Z - x0)*(Z - x1)*(Z - x2)*Δ3_0
Nn_4(Z) := (Z - x0)*(Z - x1)*(Z - x2)*(Z - x3)*Δ4_0
Nn(Z) := Nn_0(Z) + Nn_1(Z) + Nn_2(Z) + Nn_3(Z) + Nn_4(Z)
Z := -11, -10.99 .. 31
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a1 := y0
b1 := 0
c1 := 0
d1 := 0
a2 := y1
b2 := 0
c2 := 0
d2 := 0
a3 := y2
b3 := 0
c3 := 0
d3 := 0
a4 := y3
b4 := 0
c4 := 0
d4 := 0
Given
y1 == a1 + b1*(x1 - x0) + c1*(x1 - x0)^2 + d1*(x1 - x0)^3
y2 == a2 + b2*(x2 - x1) + c2*(x2 - x1)^2 + d2*(x2 - x1)^3
y3 == a3 + b3*(x3 - x2) + c3*(x3 - x2)^2 + d3*(x3 - x2)^3
y4 == a4 + b4*(x4 - x3) + c4*(x4 - x3)^2 + d4*(x4 - x3)^3
b2 == b1 + 2*c1*(x1 - x0) + 3*d1*(x1 - x0)^2
b3 == b2 + 2*c2*(x2 - x1) + 3*d2*(x2 - x1)^2
b4 == b3 + 2*c3*(x3 - x2) + 3*d3*(x3 - x2)^2
2*c2 == 2*c1 + 6*d1*(x1 - x0)
2*c3 == 2*c2 + 6*d2*(x2 - x1)
2*c4 == 2*c3 + 6*d3*(x3 - x2)
0 == 2*c4 + 6*d4*(x4 - x3)
S := Find(b1, b2, b3, b4, c2, c3, c4, d1, d2, d3, d4)
S = [-1.25767; 1.01533; 0.995187; -1.51321; 0.324715; -0.33143; 0.122397; 0.0154626; -0.072905; 0.0126063; -0.00226661]
b1 := S[0]
b2 := S[1]
b3 := S[2]
b4 := S[3]
c2 := S[4]
c3 := S[5]
c4 := S[6]
d1 := S[7]
d2 := S[8]
d3 := S[9]
d4 := S[10]
S1(z) :=
    (a1 + b1*(z - x0) + c1*(z - x0)^2 + d1*(z - x0)^3) if z ≤ x1
    (a2 + b2*(z - x1) + c2*(z - x1)^2 + d2*(z - x1)^3) if x1 ≤ z ≤ x2
    (a3 + b3*(z - x2) + c3*(z - x2)^2 + d3*(z - x2)^3) if x2 ≤ z ≤ x3
    (a4 + b4*(z - x3) + c4*(z - x3)^2 + d4*(z - x3)^3) if z ≥ x3
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VS1 := lspline(x, y)
f1(z) := interp(VS1, x, y, z)
VS2 := pspline(x, y)
f2(z) := interp(VS2, x, y, z)
VS3 := cspline(x, y)
f3(z) := interp(VS3, x, y, z)
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