# Интерполяционный многочлен Лагранжа
ORIGIN := 0
z := -4, -3.99 .. 7
x := [-3.5; 0; 2.8; 6.2]
y := [10; -30; 20; 40]
L(z) := y[0]*(z - x[1])*(z - x[2])*(z - x[3])/((x[0] - x[1])*(x[0] - x[2])*(x[0] - x[3])) + y[1]*((z - x[0])*(z - x[2])*(z - x[3]))/((x[1] - x[0])*(x[1] - x[2])*(x[1] - x[3])) + y[2]*(z - x[0])*(z - x[1])*(z - x[3])/((x[2] - x[0])*(x[2] - x[1])*(x[2] - x[3])) + y[3]*(z - x[0])*(z - x[1])*(z - x[2])/((x[3] - x[0])*(x[3] - x[1])*(x[3] - x[2]))
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a0 := 2
a1 := 3
Given
sum(a0 + a1*x[k] - y[k], k = 0 .. 3) == 0
sum((a0 + a1*x[k] - y[k])*x[k], k = 0 .. 3) == 0
M := Find(a0, a1)
P(z) := M[0] + M[1]*z
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c1 := 1
c2 := 2
c3 := 3
a1 := y[0]
a2 := y[1]
a3 := y[2]
b1 := 1
b2 := 2
b3 := 3
d1 := 1
d2 := 2
d3 := 3
Given
y[1] == a1 + b1*(x[1] - x[0]) + c1*(x[1] - x[0])^2 + d1*(x[1] - x[0])^3
y[2] == a2 + b2*(x[2] - x[1]) + c2*(x[2] - x[1])^2 + d2*(x[2] - x[1])^3
y[3] == a3 + b3*(x[3] - x[2]) + c3*(x[3] - x[2])^2 + d3*(x[3] - x[2])^3
b2 == b1 + 2*c1*(x[1] - x[0]) + 3*d1*(x[1] - x[0])^2
b3 == b2 + 2*c2*(x[2] - x[1]) + 3*d2*(x[2] - x[1])^2
2*c2 == 2*c1 + 6*d1*(x[1] - x[0])
2*c3 == 2*c2 + 6*d2*(x[2] - x[1])
0 == 2*c3 + 6*d3*(x[3] - x[2])
A := Find(b1, b2, b3, c1, c2, c3, d1, d2, d3)
s1(z) := a1 + A[0]*(z - x[0]) + A[3]*(z - x[0])^2 + A[6]*(z - x[0])^3
s2(z) := a2 + A[1]*(z - x[1]) + A[4]*(z - x[1])^2 + A[7]*(z - x[1])^3
s3(z) := a3 + A[2]*(z - x[2]) + A[5]*(z - x[2])^2 + A[8]*(z - x[2])^3
S(z) :=
    s1(z) if z ≤ x[1]
    s2(z) if x[1] < z ≤ x[2]
    s3(z) if z > x[2]
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N := 7
a := 0
b := 3*π
X := a .. b
n := (b - a)/(N - 1)
z := 0, 0.01 .. 10
i := 0 .. (N - 1)
g(X) := sin(X + π/3)*sqrt(X^3)
x[i] := i*n + a
y[i] := g(x[i])
q(z) := linterp(x, y, z)
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VS1 := lspline(x, y)
f1(z) := interp(VS1, x, y, z)
VS2 := pspline(x, y)
f2(z) := interp(VS2, x, y, z)
VS3 := cspline(x, y)
f3(z) := interp(VS3, x, y, z)
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U1 := [0; 1; 2; 4; 6; 8; 10]
U2 := [0; 1; 2; 4; 6; 10]
U3 := [0; 1; 2; 6; 10]
n := 1
VS4 := bspline(x, y, U1, n)
f4(z) := interp(VS4, x, y, z)
n := 2
VS5 := bspline(x, y, U2, n)
f5(z) := interp(VS5, x, y, z)
n := 3
VS6 := bspline(x, y, U3, n)
f6(z) := interp(VS6, x, y, z)
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R := line(x, y) = [2.59086; -0.833711]
f1(z) := R[0]*z + R[1]
R := medfit(x, y) = [-6.29052; 1.75156]
f2(z) := R[0]*z + R[1]
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r := 2
K1 := regress(x, y, r)
I1(z) := interp(K1, x, y, z)
r := 4
K2 := regress(x, y, r)
I2(z) := interp(K2, x, y, z)
r := 6
K3 := regress(x, y, r)
I3(z) := interp(K3, x, y, z)
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span := 10
K4 := loess(x, y, span)
I4(z) := interp(K4, x, y, z)
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g := [2; 8; 4]
S := pwrfit(x, y, g) = [0.0410805; 2.36315e-14; -2.18843]
f(z) := S[0]*z^S[1] + S[2]
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