Z1 := READRGB("D:\fhdsfsdhjfksdhfjsdhfajsdofhdsoajfhdsajfs\L_5\Cap_1_3")
Z := READRGB("D:\fhdsfsdhjfksdhfjsdhfajsdofhdsoajfhdsajfs\L_5\Cap_1")
# [component: inputs Z]
# [component: inputs Z1]
col := cols(Z) = 642
col := cols(Z1) = 642
row := rows(Z) = 285
row := rows(Z1) = 285
r := submatrix(Z, 0, rows(Z) - 1, 0, cols(Z)/3 - 1)
r1 := submatrix(Z1, 0, rows(Z1) - 1, 0, cols(Z1)/3 - 1)
g := submatrix(Z, 0, rows(Z) - 1, cols(Z)/3, cols(Z)*2/3 - 1)
g1 := submatrix(Z1, 0, rows(Z1) - 1, cols(Z1)/3, cols(Z1)*2/3 - 1)
b := submatrix(Z, 0, rows(Z) - 1, cols(Z)*2/3, cols(Z) - 1)
b1 := submatrix(Z1, 0, rows(Z1) - 1, cols(Z1)*2/3, cols(Z1) - 1)
# [component: inputs r, g, b]
# [component: inputs r1, g1, b1]
Normir(Z) :=
    r ← rows(Z)
    c ← cols(Z)
    minN ← min(Z)
    maxX ← max(Z)
    for i ∈ 0 .. r - 1
        for j ∈ 0 .. c - 1
            P[i, j] ← round((Z[i, j] - minN)/(maxX - minN)*255)
    P
Rn1 := Normir(r)
Gn1 := Normir(g)
Bn1 := Normir(b)
# [component: inputs Rn1, Gn1, Bn1]
BR := 1
SAT := 0
CON := 1
SY := 0.299*Rn1 + 0.587*Gn1 + 0.114*Bn1
R_Y := (Rn1 - SY)*SAT
G_Y := (Gn1 - SY)*SAT
B_Y := (Bn1 - SY)*SAT
SYn := SY*CON + (BR - CON)*255
Rnn := R_Y + SYn
Gnn := G_Y + SYn
Bnn := B_Y + SYn
Normir1(M) :=
    c ← cols(M)
    r ← rows(M)
    for i ∈ 0 .. r - 1
        for j ∈ 0 .. c - 1
            M[i, j] ← 255 if M[i, j] > 255
            M[i, j] ← 0 if M[i, j] < 0
    M
rnn := -Normir1(Rnn)
gnn := -Normir1(Gnn)
bnn := -Normir1(Bnn)
# [component: inputs rnn, gnn, bnn]
