img_1 := READRGB("Cap_1.bmp")
img_2 := READRGB("Cap_1_3.bmp")
# [component: inputs img_1]
# [component: inputs img_2]
img_1_cols := cols(img_1) = 642
img_1_rows := rows(img_1) = 285
img_1_r := submatrix(img_1, 0, 284, 0, img_1_cols/3 - 1)
img_1_g := submatrix(img_1, 0, 284, img_1_cols/3, (img_1_cols*2/3) - 1)
img_1_b := submatrix(img_1, 0, 284, img_1_cols*2/3, img_1_cols - 1)
img_2_cols := cols(img_2) = 642
img_2_rows := rows(img_2) = 285
img_2_r := submatrix(img_2, 0, 284, 0, img_2_cols/3 - 1)
img_2_g := submatrix(img_2, 0, 284, img_2_cols/3, (img_2_cols*2/3) - 1)
img_2_b := submatrix(img_2, 0, 284, img_2_cols*2/3, img_2_cols - 1)
# [component: inputs img_1_r, img_1_g, img_1_b]
# [component: inputs img_2_r, img_2_g, img_2_b]
index := 0 .. 642/3
img_1_clr[:, index] := img_1[:, index + 214]
# [component: inputs img_1_clr]
normilizer(img) :=
    r ← rows(img)
    c ← cols(img)
    min_v ← min(img)
    max_v ← max(img)
    for i ∈ 0 .. r - 1
        for j ∈ 0 .. c - 1
            p[i, j] ← round((img[i, j] - min_v)/(max_v - min_v)*255)
    p
img_1_norm_r := normilizer(img_1_r)
img_2_norm_r := normilizer(img_2_r)
img_1_norm_g := normilizer(img_1_g)
i_diff_r := normilizer(img_1_norm_r - img_2_norm_r)
img_2_norm_g := normilizer(img_2_g)
img_1_norm_b := normilizer(img_1_b)
i_diff_g := normilizer(img_1_norm_g - img_2_norm_g)
img_2_norm_b := normilizer(img_2_b)
# [component: inputs img_1_norm_r, img_1_norm_g, img_1_norm_b]
# [component: inputs img_2_norm_r, img_2_norm_g, img_2_norm_b]
i_diff_b := normilizer(img_1_norm_b - img_2_norm_b)
# [component: inputs i_diff_r, i_diff_g, i_diff_b]
BR := 1
SAT := 1
CON := 1
limiter(img) :=
    r ← rows(img)
    c ← cols(img)
    for i ∈ 0 .. r - 1
        for j ∈ 0 .. c - 1
            p[i, j] ←
                0 if img[i, j] < 0
                255 if img[i, j] > 255
                img[i, j] otherwise
    p
SY := 0.299*img_1_norm_r + 0.587*img_1_norm_g + 0.114*img_1_norm_b
R_Y := (img_1_norm_r - SY)*SAT
G_Y := (img_1_norm_g - SY)*SAT
B_Y := (img_1_norm_b - SY)*SAT
SYn := SY*CON + (BR - CON)*255
img_1_mod_r := R_Y + SYn
img_1_mod_g := G_Y + SYn
img_1_mod_b := B_Y + SYn
img_1_out_r := limiter(img_1_mod_r)
img_1_out_g := limiter(img_1_mod_g)
img_1_out_b := limiter(img_1_mod_b)
# [component: inputs [(img_1_out_r, img_1_out_g, img_1_out_b), □, □]]
