# A :=1
T := 2 + FRAME/5
τ :=
    (0.25 + FRAME/4) if FRAME ≤ 39
    10 otherwise
n1 := 0, 0.1 .. 3*2*T
n := 0 .. 3*2*T
t := 0, 0.01 .. 20
C_fx(n) :=
    A*τ/(2*T) if n == 0
    2*|(2 A*T/(τ*n^2*π^2))*sin(n*π*τ/(2*T))^2| if n > 0
C[n1] :=
    A*τ/(2*T) if n1 == 0
    2*|(2 A*T/(τ*n1^2*π^2))*sin(n1*π*τ/(2*T))^2| if n1 > 0  # error: This value must be an integer.
f(t) := A*τ/(2*T) + sum(2*A*T/(τ*k^2*π^2)*sin(k*π*τ/(2*T))^2*cos(k*2*π/T*t), k = 1 .. 50)
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# A :=1
T := 2 + FRAME/5
τ :=
    (0.25 + FRAME/4) if FRAME ≤ 39
    10 otherwise
n1 := 0, 0.01 .. 3*2*T
n := 0 .. 3*2*T
t := 0, 0.01 .. 20
C[n] :=
    A*τ/(2*T) if n == 0
    2*|(2 A*T/(τ*n^2*π^2))*sin(n*π*τ/(2*T))^2| if n > 0
f(t) := A*τ/(2*T) + sum(2*A*T/(τ*k^2*π^2)*sin(k*π*τ/(2*T))^2*cos(k*2*π/T*t), k = 1 .. 50)
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# A :=1
T := 3
τ := 1
n1 := 0, 0.01 .. 10
n := 0 .. 3*2*T
t := 0, 0.01 .. 6
C[n] :=
    A*τ/(2*T) if n == 0
    2*|(2 A*T/(τ*n^2*π^2))*sin(n*π*τ/(2*T))^2| if n > 0
f(t) :=
    (A*τ/(2*T)) if FRAME == 0
    (A*τ/(2*T) + sum(2*A*T/(τ*k^2*π^2)*sin(k*π*τ/(2*T))^2*cos(k*2*π/T*t), k = 1 .. floor(FRAME/10) + 1)) if FRAME > 0
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