C0 := 331
l := 37
b := 23
h := 14  # да просто настроить l , b, h
f0(m, n, p) := C0/2*sqrt((m/l)^2 + (n/b)^2 + (p/h)^2)  # Насколько считаем (макс частота, чем выше, тем лольше расчет маткада)
upto := 30
f0(10, 20, 30) = 385.335
fx(i) := f0(mod(floor(i/upto^2), upto + 1), mod(floor(i/upto), upto + 1), mod(i, upto + 1))
i := 1 .. upto^3
# Хочется выразить благодарность Евгению, который мотивировал меня своим проникновенным молчанием на протяжении всего крафта этого файла
# Дай бог ему сил и легкой сдачи Хоминича
# BLESS
data[i] := round(fx(i), 1)
data := sort(data)
max_fx := max(data)
f := 0, 0.1 .. max_fx + 1
fndr(f) :=
    try
        match(f, data)
    on error
        -1
ampl(f) := rows(fndr(f))
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